# OpenSim document version 30000
Model default:
  credits: L. Tagliapietra - tagliapietra.work@gmail.com
  length_units: meters
  force_units: N
  gravity: 0 0 -9.81
  BodySet:
    Body ground: mass=0 mass_center=(0 0 0) inertia_xx=1 inertia_yy=1 inertia_zz=1
    Body base: mass=4 mass_center=(0 0 0) inertia_xx=0.006106331 inertia_yy=0.006106331 inertia_zz=0.01125
        meshes=Base.obj
      BallJoint baseToGround: parent_body=ground location_in_parent=(0 0 0) location=(0 0 0)
        Coordinate rotX: default_value=-0.00119134 range=(-3.141593 3.141593) locked=true
        Coordinate rotY: default_value=0.00039831 range=(-3.141593 3.141593) locked=true
        Coordinate rotZ: default_value=-1.639827 range=(-3.141593 3.141593) locked=true
    Body shoulder: mass=7.778 mass_center=(0 0 0) inertia_xx=0.03147431 inertia_yy=0.03147431 inertia_zz=0.02187562
        meshes=Shoulder.obj
      PinJoint shoulderToBase: parent_body=base location_in_parent=(0 0 0.1273) location=(0 0 0)
        Coordinate shoulder_pan_joint: motion_type=rotational default_value=0.00008357 range=(-3.141593 3.141593)
    Body upperArm: mass=12.93 mass_center=(0 0 0.306) inertia_xx=1.632467 inertia_yy=1.632467 inertia_zz=0.03636562
        meshes=UpperArm.obj
      PinJoint upperArmToShoulder: parent_body=shoulder location_in_parent=(0 0.220941 0)
          orientation_in_parent=(-1.570796 0 1.570796) location=(0 0 0) orientation=(-1.570796 0 0)
        Coordinate shoulder_lift_joint: motion_type=rotational default_value=-0.00002135 range=(-3.141593 3.141593)
    Body forearm: mass=3.87 mass_center=(0 0 0.28615) inertia_xx=0.4279523 inertia_yy=0.4279523 inertia_zz=0.01088437
        meshes=Forearm.obj
      PinJoint forearmToUpperArm: parent_body=upperArm location_in_parent=(0 -0.1719 0.612)
          orientation_in_parent=(-1.570796 0 0) location=(0 0 0) orientation=(-1.570796 0 0)
        Coordinate elbow_joint: motion_type=rotational default_value=-0.00002375 range=(-3.141593 3.141593)
    Body wrist1: mass=1.96 mass_center=(0 0 0) inertia_xx=0.005108248 inertia_yy=0.005108248 inertia_zz=0.0055125
        meshes=Wrist1.obj
      PinJoint wrist1ToForearm: parent_body=forearm location_in_parent=(0 0 0.5723)
          orientation_in_parent=(-1.570796 0 1.570796) location=(0 0 0) orientation=(-1.570796 0 0)
        Coordinate wrist_1_joint: motion_type=rotational default_value=-1.549506 range=(-3.141593 3.141593) locked=true
    Body wrist2: mass=1.96 mass_center=(0 0 0) inertia_xx=0.005108248 inertia_yy=0.005108248 inertia_zz=0.0055125
        meshes=Wrist2.obj
      PinJoint wrist2ToWrist1: parent_body=wrist1 location_in_parent=(0 0.1149 0) location=(0 0 0)
        Coordinate wrist_2_joint: motion_type=rotational default_value=-1.569582 range=(-3.141593 3.141593) locked=true
    Body wrist3: mass=0.202 mass_center=(0 0 0) inertia_xx=0.0005264623 inertia_yy=0.0005264623 inertia_zz=0.000568125
        meshes=Wrist3.obj
      PinJoint wrist3ToWrist2: parent_body=wrist2 location_in_parent=(0 0 0.1157) orientation_in_parent=(-1.570796 0 0)
          location=(0 0 0) orientation=(-1.570796 0 0)
        Coordinate wrist_3_joint: motion_type=rotational default_value=-0.00068456 range=(-3.141593 3.141593)
            locked=true
    Body endEffector: mass=0.1 mass_center=(0 0 0) inertia_xx=0.0002666667 inertia_yy=0.0002666667
        inertia_zz=0.0002666667 meshes=box.vtp
      WeldJoint eeToWrist3: parent_body=wrist3 location_in_parent=(0 0.1149 0) location=(0 0 0)
    Body imu_base: mass=0.035 mass_center=(0 0 0) inertia_xx=0 inertia_yy=0 inertia_zz=0
        meshes=imu_afterCalibration.obj
      WeldJoint imu1ToBase: parent_body=base location_in_parent=(0.1 -0.2 0) orientation_in_parent=(0 0 1.570796)
          location=(0 0 0)
    Body imu_shoulder: mass=0.035 mass_center=(0 0 0) inertia_xx=0 inertia_yy=0 inertia_zz=0
        meshes=imu_afterCalibration.obj
      WeldJoint imu2ToShoulder: parent_body=shoulder location_in_parent=(-0.03 -0.015 0.0865)
          orientation_in_parent=(0.1 0 0) location=(0 0 0)
    Body imu_upperArm: mass=0.035 mass_center=(0 0 0) inertia_xx=0 inertia_yy=0 inertia_zz=0
        meshes=imu_afterCalibration.obj
      WeldJoint imu3ToUpperArm: parent_body=upperArm location_in_parent=(0.015 0.022 0.605)
          orientation_in_parent=(-1.45 0 3.14) location=(0 0 0)
    Body imu_forearm: mass=0.035 mass_center=(0 0 0) inertia_xx=0 inertia_yy=0 inertia_zz=0
        meshes=imu_afterCalibration.obj
      WeldJoint imu4ToForearm: parent_body=forearm location_in_parent=(-0.01 -0.059 0.577)
          orientation_in_parent=(1.47 0 0) location=(0 0 0)
  ComponentSet MiscComponents:
    OrientationSensor Imu_13: body=imu_base position_offset=(0 0 0)
        rotation_offset=(0.004972522 0.002790581 0.06894569)
    OrientationSensor Imu_14: body=imu_shoulder position_offset=(0 0 0)
        rotation_offset=(-0.01234816 0.009378447 0.1169004)
    OrientationSensor Imu_15: body=imu_upperArm position_offset=(0 0 0)
        rotation_offset=(0.06053636 0.003205505 0.01204063)
    OrientationSensor Imu_16: body=imu_forearm position_offset=(0 0 0) rotation_offset=(0.2467051 0.0105131 0.01488444)
