# OpenSim document version 30000
InverseKinematicsExtendedTool:
  model_file: ../models/ur10_scaled_wOS.osim
  constraint_weight: Inf
  accuracy: 1e-8
  orientation_sensor_file: ../inputs/imus/tr_100.mot
  time_range: 0 40
  report_errors: true
  output_motion_file: ../outputs/ob-ik_out_tr_100.mot
  report_marker_locations: false
  IKExtendedTaskSet:
    IKOrientationSensorTask Imu_13: apply=true weight=1
    IKOrientationSensorTask Imu_14: apply=true weight=10
    IKOrientationSensorTask Imu_15: apply=true weight=10
    IKOrientationSensorTask Imu_16: apply=true weight=10
