# OpenSim document version 30000
ScaleExtendedTool default:
  mass: -1 [kg]
  height: -1
  age: -1
  GenericModelMaker:
    model_file: ../models/ur10.osim
  ModelScaler:
    apply: false
    time_range: -1 -1
    preserve_mass_distribution: false
  MarkerPlacer:
    apply: false
    time_range: -1 -1
    max_marker_movement: -1
  OrientationSensorPlacer: apply=true orientationSensors_file=../inputs/imus/static.mot
      coordinate_file=../inputs/encoders/static.mot time_range=(0 1) output_motion_file=../outputs/scaling_static.mot
      output_model_file=../models/ur10_scaled_wOS.osim max_oSensors_movement=-1
    IKExtendedTaskSet:
      IKOrientationSensorTask Imu_13: apply=true weight=1
      IKOrientationSensorTask Imu_14: apply=true weight=1
      IKOrientationSensorTask Imu_15: apply=true weight=1
      IKOrientationSensorTask Imu_16: apply=true weight=1
      IKCoordinateTask rotX: apply=false weight=1 value_type=from_file value=0
      IKCoordinateTask rotY: apply=false weight=1 value_type=from_file value=0
      IKCoordinateTask rotZ: apply=false weight=1 value_type=from_file value=0
      IKCoordinateTask shoulder_pan_joint: apply=true weight=100 value_type=from_file value=0
      IKCoordinateTask shoulder_lift_joint: apply=true weight=100 value_type=from_file value=0
      IKCoordinateTask elbow_joint: apply=true weight=100 value_type=from_file value=0
      IKCoordinateTask wrist_1_joint: apply=true weight=100 value_type=from_file value=0
      IKCoordinateTask wrist_2_joint: apply=true weight=100 value_type=from_file value=0
      IKCoordinateTask wrist_3_joint: apply=true weight=100 value_type=from_file value=0
